R := 10
V_O(R_d) := 5*(R + R_d)/(2*R + R_d) - 2.5
# [plot: V_O(R_d) vs R_d]
R := 1000
V_O(R_d) := 5*(R + R_d)/(2*R + R_d) - 2.5
# [plot: V_O(R_d) vs R_d]
ω := 50000/(2*π)
A := 5
C_2 := 57
C_1 := 37
V_2(t) := 1j*ω*C_2*A*cos(ω*t)
V_1(t) := 1j*ω*C_1*A*cos(ω*t)
V_0(t) := 220*(V_2(t) - V_1(t))
# [plot: V_0(t) vs t]
